*Heading
** Job name: Job-1 Model name: model
** Generated by: Abaqus/CAE 2020
*Preprint, echo=NO, model=NO, history=NO, contact=NO
**
** PARTS
**
*Part, name=layup
*Node
      1,   138.636307,   455.135864
      2,   172.529999,           0.
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*Element, type=CGAX6
1, 19303, 19302,   966, 20478, 20479, 20480
2,   982,     1,    58, 20481, 20482, 20483
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*Element, type=CGAX8R
  3,   981,   982,    58,    59, 20484, 20483, 20485, 20486
  4,    59,    60,   980,   981, 20487, 20488, 20489, 20486
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*Nset, nset=set_layup, generate
     1,  60886,      1
*Elset, elset=set_layup, generate
     1,  19933,      1
*Nset, nset=set_layer_1
     1,     2,     3,    58,    59,    60
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*Elset, elset=set_layer_1, generate
   1,  474,    1
*Nset, nset=set_layer_2
     4,     5,    23,   983,   984,   985
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*Elset, elset=set_layer_2, generate
 4838,  5334,     1
*Nset, nset=set_layer_3
    10,    12,    24,  3444,  3445,  3446
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*Elset, elset=set_layer_3, generate
 5335,  5883,     1
*Nset, nset=set_layer_4
     7,     8,    25,  1938,  1939,  1940
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*Elset, elset=set_layer_4, generate
 5884,  6404,     1
*Nset, nset=set_layer_5
    10,    11,    26,  2927,  2928,  2929
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*Elset, elset=set_layer_5, generate
 6405,  6963,     1
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*Elset, elset=_surf_contact_layup_S1, internal
 10570, 10571, 11211, 11512, 11907, 12203
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*Elset, elset=_surf_contact_layup_S4, internal
 10812, 13963, 14242, 14628, 15215, 15216
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*Elset, elset=_surf_contact_layup_S2, internal
 11511, 13561, 14243, 14621, 14629, 14899
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*Elset, elset=_surf_contact_layup_S3, internal
 13273, 13274, 13625, 15198, 15199, 15200
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*Surface, type=ELEMENT, name=surf_contact_layup
_surf_contact_layup_S1, S1
_surf_contact_layup_S4, S4
_surf_contact_layup_S2, S2
_surf_contact_layup_S3, S3
*Orientation, name=Ori-orientation, system=RECTANGULAR
orientation
3, 0.
** Section: layup_section
*Solid Section, elset=set_layup, orientation=Ori-orientation, material=layup_material
,
*Distribution, name=orientation, location=ELEMENT, Table=orientation_Table
,           1.,           0.,           0.,           0.,           1.,           0.
1,           1.,           0.,           0.,           0.,           1.,           0.
*End Part
**
*Part, name=liner
*Node
      1,          24.,    497.90625
      2,          30.,    497.90625
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*Element, type=CGAX8R
 1,   1,  17, 429,  50, 631, 632, 633, 634
 2,  17,   2,  18, 429, 635, 636, 637, 632
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*Nset, nset=set_liner, generate
    1,  1677,     1
*Elset, elset=set_liner, generate
   1,  418,    1
*Elset, elset=_surf_contact_liner_S2, internal
   2,   4,   6,   8,  10,  12
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*Elset, elset=_surf_contact_liner_S4, internal
  35,  37,  39,  41,  43,  45
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*Surface, type=ELEMENT, name=surf_contact_liner
_surf_contact_liner_S2, S2
_surf_contact_liner_S4, S4
*Elset, elset=_surf_load_S2, internal
  36,  38,  40,  42,  44,  46
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*Elset, elset=_surf_load_S4, internal
 297, 299, 301, 303, 305, 307
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*Surface, type=ELEMENT, name=surf_load
_surf_load_S2, S2
_surf_load_S4, S4
** Section: liner_section
*Solid Section, elset=set_liner, material=liner_material
,
*End Part
**
**
** ASSEMBLY
**
*Assembly, name=Assembly
**
*Instance, name=layup_instance, part=layup
*End Instance
**
*Instance, name=liner_instance, part=liner
*End Instance
**
*Nset, nset=set_sym_bc, instance=layup_instance
     2,     3,     5,     6,     8,     9
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*Nset, nset=set_sym_bc, instance=liner_instance
    7,    8,  177, 1346, 1349
*Elset, elset=set_sym_bc, instance=layup_instance
   265,   747,  1248,  1769,  2042,  2671
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*Elset, elset=set_sym_bc, instance=liner_instance
 285, 286
*End Assembly
**
** MATERIALS
**
*Material, name=layup_material
*Elastic, type=ENGINEERING CONSTANTS
139260.,5989.,5989., 0.26, 0.26,  0.4,2612.,2612.
2139.,
*Material, name=liner_material
*Elastic
1325., 0.3
**
** INTERACTION PROPERTIES
**
*Surface Interaction, name=IntProp-1
1.,
*Friction
0.,
*Surface Behavior, pressure-overclosure=HARD
*Distribution Table, name=orientation_Table
coord3d, coord3d
**
** INTERACTIONS
**
** Interaction: Int-1
*Contact Pair, interaction=IntProp-1, small sliding, type=SURFACE TO SURFACE, no thickness, adjust=0.0
layup_instance.surf_contact_layup, liner_instance.surf_contact_liner
** ----------------------------------------------------------------
**
** STEP: Step-1
**
*Step, name=Step-1, nlgeom=NO, inc=10000
*Static
0.01, 1., 1e-05, 0.1
**
** BOUNDARY CONDITIONS
**
** Name: BC-1 Type: Symmetry/Antisymmetry/Encastre
*Boundary
set_sym_bc, YSYMM
**
** LOADS
**
** Name: Load-1   Type: Pressure
*Dsload
liner_instance.surf_load, P, 75.
**
** OUTPUT REQUESTS
**
*Restart, write, frequency=0
**
** FIELD OUTPUT: F-Output-1
**
*Output, field, variable=PRESELECT
**
** HISTORY OUTPUT: H-Output-1
**
*Output, history, variable=PRESELECT
*End Step
