*Heading
** Job name: Job-1-Copy5 Model name: model
** Generated by: Abaqus/CAE 2020
*Preprint, echo=NO, model=NO, history=NO, contact=NO
**
** PARTS
**
*Part, name=layup
*Node
      1,   138.636307,   455.135864
      2,   172.529999,           0.
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*Element, type=CGAX3
1, 320,  58,  59
2,  60, 319,  59
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*Element, type=CGAX4R
  9, 315, 316,  63,  64
 10, 313, 314,  65,  66
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*Nset, nset=set_layup, generate
    1,  5538,     1
*Elset, elset=set_layup, generate
    1,  6001,     1
*Nset, nset=set_layer_1
   1,   2,   3,  58,  59,  60
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*Elset, elset=set_layer_1, generate
   1,  136,    1
*Nset, nset=set_layer_2
    4,    5,   23,  321,  322,  323
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*Elset, elset=set_layer_2, generate
 1508,  1710,     1
*Nset, nset=set_layer_3
   10,   12,   24, 1023, 1024, 1025
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*Elset, elset=set_layer_3, generate
 1711,  1879,     1
*Nset, nset=set_layer_4
    7,    8,   25,  595,  596,  597
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*Elset, elset=set_layer_4, generate
 1880,  2020,     1
*Nset, nset=set_layer_5
   10,   11,   26,  876,  877,  878
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*Elset, elset=set_layer_5, generate
 2021,  2193,     1
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*Elset, elset=_surf_contact_layup_S3, internal
 3313, 3465, 3650, 3903, 4060, 4467
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*Elset, elset=_surf_contact_layup_S4, internal
 4209, 4368, 4609, 4610, 4645, 4646
*Elset, elset=_surf_contact_layup_S2, internal
 4464, 4480, 4487, 4506, 4591, 4648
*Elset, elset=_surf_contact_layup_S1, internal
 4484, 4507, 4508, 4509, 4510, 4511
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*Surface, type=ELEMENT, name=surf_contact_layup
_surf_contact_layup_S3, S3
_surf_contact_layup_S4, S4
_surf_contact_layup_S2, S2
_surf_contact_layup_S1, S1
*Orientation, name=Ori-orientation, system=RECTANGULAR
orientation
3, 0.
** Section: layup_section
*Solid Section, elset=set_layup, orientation=Ori-orientation, material=layup_material
,
*Distribution, name=orientation, location=ELEMENT, Table=orientation_Table
,           1.,           0.,           0.,           0.,           1.,           0.
1, -0.83913249226231, 0.521830900596026, -0.153457393477094,           0., 0.282128618294005, 0.959376590677256
2, -0.83913249226231, 0.522520627727295, -0.151092203733737, 3.30765116016418e-17, 0.277780260100393, 0.960644641424995
3, -0.814383532361398, 0.558133942080067, -0.158952712832265,           0., 0.273901963038601, 0.961757617408669
4, -0.786401365481623, 0.594666574925303, -0.167166255671556, 3.52944143206444e-17, 0.270619980150295, 0.962686255403833
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1507, -0.947844537727785, 0.297653657616335, -0.113986983499075, -1.46414177171743e-17, 0.357625283751769, 0.93386517036533
*End Part
**
**
** ASSEMBLY
**
*Assembly, name=Assembly
**
*Instance, name=layup_instance, part=layup
*End Instance
**
*Nset, nset=set_sym_bc, instance=layup_instance
    2,    3,    4,    5,    6,    8
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*Elset, elset=set_sym_bc, instance=layup_instance
   70,  202,  341,  494,  575,  744
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*End Assembly
**
** MATERIALS
**
*Material, name=layup_material
*Elastic, type=ENGINEERING CONSTANTS
139260.,5989.,5989., 0.26, 0.26,  0.4,2612.,2612.
2139.,
*Distribution Table, name=orientation_Table
coord3d, coord3d
** ----------------------------------------------------------------
**
** STEP: Step-1
**
*Step, name=Step-1, nlgeom=NO, inc=10000
*Static, direct
1., 1.,
**
** BOUNDARY CONDITIONS
**
** Name: BC-1 Type: Symmetry/Antisymmetry/Encastre
*Boundary
set_sym_bc, YSYMM
**
** LOADS
**
** Name: Load-1   Type: Pressure
*Dsload
layup_instance.surf_contact_layup, P, 75.
**
** OUTPUT REQUESTS
**
*Restart, write, frequency=0
**
** FIELD OUTPUT: F-Output-1
**
*Output, field, variable=PRESELECT
**
** HISTORY OUTPUT: H-Output-1
**
*Output, history, variable=PRESELECT
*End Step
